# OpenSim document version 30507
Model 3DGaitModel2354:
  gravity: 0 -9.80665 0
  length_units: meters
  force_units: N
  credits:
    Delp S.L., Loan J.P., Hoy M.G., Zajac F.E., Topp E.L., Rosen J.M., Thelen D.G., Anderson F.C., Seth A. Notes: 3D, 23 DOF gait model created by D.G. Thelen, Univ. of Wisconsin-Madison, and Ajay Seth, Frank C. Anderson, and Scott L. Delp, Stanford University. Lower extremity joint defintions based on Delp et al. (1990). Low back joint and anthropometry based on Anderson and Pandy (1999, 2001). Planar knee model of Yamaguchi and Zajac (1989). Seth replaced tibia translation constraints with a CustomJoint for the knee and removed the patella to eliminate all kinematic constraints; insertions of the quadrucepts are handled with moving points in the tibia frame as defined by Delp 1990. Number of muscles was reduced by Anderson to improve simulation speed for demonstrations and is not intended to be used in research. License: Creative Commons (CCBY 3.0). You are free to distribute, remix, tweak, and build upon this work, even commercially, as long as you credit us for the original creation. http://creativecommons.org/licenses/by/3.0/ More Information: http://simtk-confluence.stanford.edu:8080/display/OpenSim/Gait+2392+and+2354+Models
  publications:
    Delp, S.L., Loan, J.P., Hoy, M.G., Zajac, F.E., Topp E.L., Rosen, J.M.: An interactive graphics-based model of the lower extremity to study orthopaedic surgical procedures, IEEE Transactions on Biomedical Engineering, vol. 37, pp. 757-767, 1990. Yamaguchi G.T., Zajac F.E.: A planar model of the knee joint to characterize the knee extensor mechanism." J . Biomech. vol. 22. pp. 1-10. 1989. Anderson F.C., Pandy M.G.: A dynamic optimization solution for vertical jumping in three dimensions. Computer Methods in Biomechanics and Biomedical Engineering 2:201-231, 1999. Anderson F.C., Pandy M.G.: Dynamic optimization of human walking. Journal of Biomechanical Engineering 123:381-390, 2001.
  Ground
  BodySet:
    Body pelvis: mass=11.28116 [kg] mass_center=(-0.0707 0 0) inertia=(0.09847189 0.08343289 0.05546228 0 0 0)
        meshes=(sacrum.vtp pelvis.vtp l_pelvis.vtp)
    Body femur_r: mass=8.90979 mass_center=(0 -0.17 0) inertia=(0.1282625 0.03362221 0.1352552 0 0 0) meshes=femur.vtp
    Body tibia_r: mass=3.551406 mass_center=(0 -0.1867 0) inertia=(0.04827805 0.004885278 0.04894857 0 0 0)
        meshes=(tibia.vtp fibula.vtp)
    Body talus_r: mass=0.09578977 mass_center=(0 0 0) inertia=(0.0009578977 0.0009578977 0.0009578977 0 0 0)
        meshes=talus.vtp
    Body calcn_r: mass=1.197372 mass_center=(0.1 0.03 0) inertia=(0.001341057 0.003735801 0.003927381 0 0 0)
        meshes=foot.vtp
    Body toes_r: mass=0.2074806 mass_center=(0.0346 0.006 -0.0175) inertia=(9.578977e-5 0.0001915795 9.578977e-5 0 0 0)
        meshes=bofoot.vtp
    Body femur_l: mass=8.90979 mass_center=(0 -0.17 0) inertia=(0.1282625 0.03362221 0.1352552 0 0 0)
        meshes=l_femur.vtp
    Body tibia_l: mass=3.551406 mass_center=(0 -0.1867 0) inertia=(0.04827805 0.004885278 0.04894857 0 0 0)
        meshes=(l_tibia.vtp l_fibula.vtp)
    Body talus_l: mass=0.09578977 mass_center=(0 0 0) inertia=(0.0009578977 0.0009578977 0.0009578977 0 0 0)
        meshes=l_talus.vtp
    Body calcn_l: mass=1.197372 mass_center=(0.1 0.03 0) inertia=(0.001341057 0.003735801 0.003927381 0 0 0)
        meshes=l_foot.vtp
    Body toes_l: mass=0.2074806 mass_center=(0.0346 0.006 0.0175) inertia=(9.578977e-5 0.0001915795 9.578977e-5 0 0 0)
        meshes=l_bofoot.vtp
    Body torso: mass=32.79516 mass_center=(-0.03 0.32 0) inertia=(1.41242 0.7236917 1.371135 0 0 0)
        meshes=(hat_spine.vtp hat_jaw.vtp hat_skull.vtp hat_ribs.vtp)
  JointSet:
    CustomJoint ground_pelvis:
      connectors: parent_frame=../ground child_frame=../pelvis
      Coordinate pelvis_tilt: default_value=0 range=(-1.570796 1.570796) clamped=false
      Coordinate pelvis_list: default_value=0 range=(-1.570796 1.570796) clamped=false
      Coordinate pelvis_rotation: default_value=0 range=(-1.570796 1.570796) clamped=false
      Coordinate pelvis_tx: default_value=0 range=(-5 5) clamped=false
      Coordinate pelvis_ty: default_value=0 range=(-1 2) clamped=false
      Coordinate pelvis_tz: default_value=0 range=(-3 3) clamped=false
      SpatialTransform:
        TransformAxis rotation1: coordinates=pelvis_tilt axis=(0 0 1) LinearFunction(coefficients=1 0)
        TransformAxis rotation2: coordinates=pelvis_list axis=(1 0 0) LinearFunction(coefficients=1 0)
        TransformAxis rotation3: coordinates=pelvis_rotation axis=(0 1 0) LinearFunction(coefficients=1 0)
        TransformAxis translation1: coordinates=pelvis_tx axis=(1 0 0) LinearFunction(coefficients=1 0)
        TransformAxis translation2: coordinates=pelvis_ty axis=(0 1 0) LinearFunction(coefficients=1 0)
        TransformAxis translation3: coordinates=pelvis_tz axis=(0 0 1) LinearFunction(coefficients=1 0)
    CustomJoint hip_r:
      connectors: parent_frame=pelvis_offset child_frame=../femur_r
      Coordinate hip_flexion_r: default_value=0 range=(-2.094395 2.094395) clamped=false
      Coordinate hip_adduction_r: default_value=0 range=(-2.094395 2.094395) clamped=false
      Coordinate hip_rotation_r: default_value=0 range=(-2.094395 2.094395) clamped=false
      PhysicalOffsetFrame pelvis_offset: translation=(-0.0707 -0.0661 0.0835)
        connectors: parent=../../pelvis
      SpatialTransform: axes_held_at_zero=(translation1 translation2 translation3)
        TransformAxis rotation1: coordinates=hip_flexion_r axis=(0 0 1) LinearFunction(coefficients=1 0)
        TransformAxis rotation2: coordinates=hip_adduction_r axis=(1 0 0) LinearFunction(coefficients=1 0)
        TransformAxis rotation3: coordinates=hip_rotation_r axis=(0 1 0) LinearFunction(coefficients=1 0)
    CustomJoint knee_r:
      connectors: parent_frame=../femur_r child_frame=../tibia_r
      Coordinate knee_angle_r: default_value=0 range=(-2.094395 0.1745329) clamped=false
      SpatialTransform: axes_held_at_zero=(rotation2 rotation3 translation3)
        TransformAxis rotation1: coordinates=knee_angle_r axis=(0 0 1) LinearFunction(coefficients=1 0)
        TransformAxis translation1: coordinates=knee_angle_r axis=(1 0 0)
          MultiplierFunction: scale=1
            SimmSpline: x=(-2.0944 -1.74533 -1.39626 -1.0472 -0.698132 -0.349066 -0.174533 0.197344 0.337395 0.490178 1.52146 2.0944)
                y=(-0.0032 0.00179 0.00411 0.0041 0.00212 -0.001 -0.0031 -0.005227 -0.005435 -0.005574 -0.005435 -0.00525)
        TransformAxis translation2: coordinates=knee_angle_r axis=(0 1 0)
          MultiplierFunction: scale=1
            SimmSpline: x=(-2.0944 -1.22173 -0.523599 -0.349066 -0.174533 0.159149 2.0944)
                y=(-0.4226 -0.4082 -0.399 -0.3976 -0.3966 -0.395264 -0.396)
    CustomJoint ankle_r:
      connectors: parent_frame=tibia_r_offset child_frame=../talus_r
      Coordinate ankle_angle_r: default_value=0 range=(-1.570796 1.570796) clamped=false
      PhysicalOffsetFrame tibia_r_offset: translation=(0 -0.43 0)
        connectors: parent=../../tibia_r
      SpatialTransform: axes_held_at_zero=(rotation2 rotation3 translation1 translation2 translation3)
        TransformAxis rotation1: coordinates=ankle_angle_r axis=(-0.1050135 -0.1740224 0.9791263)
            LinearFunction(coefficients=1 0)
    CustomJoint subtalar_r:
      connectors: parent_frame=talus_r_offset child_frame=../calcn_r
      Coordinate subtalar_angle_r: default_value=0 range=(-1.570796 1.570796) clamped=false
      PhysicalOffsetFrame talus_r_offset: translation=(-0.04877 -0.04195 0.00792)
        connectors: parent=../../talus_r
      SpatialTransform: axes_held_at_zero=(rotation2 rotation3 translation1 translation2 translation3)
        TransformAxis rotation1: coordinates=subtalar_angle_r axis=(0.7871796 0.6047475 -0.1209495)
            LinearFunction(coefficients=1 0)
    CustomJoint mtp_r:
      connectors: parent_frame=calcn_r_offset child_frame=../toes_r
      Coordinate mtp_angle_r: default_value=0 range=(-1.570796 1.570796) clamped=false
      PhysicalOffsetFrame calcn_r_offset: translation=(0.1788 -0.002 0.00108)
        connectors: parent=../../calcn_r
      SpatialTransform: axes_held_at_zero=(rotation2 rotation3 translation1 translation2 translation3)
        TransformAxis rotation1: coordinates=mtp_angle_r axis=(-0.5809544 0 0.8139361) LinearFunction(coefficients=1 0)
    CustomJoint hip_l:
      connectors: parent_frame=pelvis_offset child_frame=../femur_l
      Coordinate hip_flexion_l: default_value=0 range=(-2.094395 2.094395) clamped=false
      Coordinate hip_adduction_l: default_value=0 range=(-2.094395 2.094395) clamped=false
      Coordinate hip_rotation_l: default_value=0 range=(-2.094395 2.094395) clamped=false
      PhysicalOffsetFrame pelvis_offset: translation=(-0.0707 -0.0661 -0.0835)
        connectors: parent=../../pelvis
      SpatialTransform: axes_held_at_zero=(translation1 translation2 translation3)
        TransformAxis rotation1: coordinates=hip_flexion_l axis=(0 0 1) LinearFunction(coefficients=1 0)
        TransformAxis rotation2: coordinates=hip_adduction_l axis=(-1 0 0) LinearFunction(coefficients=1 0)
        TransformAxis rotation3: coordinates=hip_rotation_l axis=(0 -1 0) LinearFunction(coefficients=1 0)
    CustomJoint knee_l:
      connectors: parent_frame=../femur_l child_frame=../tibia_l
      Coordinate knee_angle_l: default_value=0 range=(-2.094395 0.1745329) clamped=false
      SpatialTransform: axes_held_at_zero=(rotation2 rotation3 translation3)
        TransformAxis rotation1: coordinates=knee_angle_l axis=(0 0 1) LinearFunction(coefficients=1 0)
        TransformAxis translation1: coordinates=knee_angle_l axis=(1 0 0)
          MultiplierFunction: scale=1
            SimmSpline: x=(-2.0944 -1.74533 -1.39626 -1.0472 -0.698132 -0.349066 -0.174533 0.197344 0.337395 0.490178 1.52146 2.0944)
                y=(-0.0032 0.00179 0.00411 0.0041 0.00212 -0.001 -0.0031 -0.005227 -0.005435 -0.005574 -0.005435 -0.00525)
        TransformAxis translation2: coordinates=knee_angle_l axis=(0 1 0)
          MultiplierFunction: scale=1
            SimmSpline: x=(-2.0944 -1.22173 -0.523599 -0.349066 -0.174533 0.159149 2.0944)
                y=(-0.4226 -0.4082 -0.399 -0.3976 -0.3966 -0.395264 -0.396)
    CustomJoint ankle_l:
      connectors: parent_frame=tibia_l_offset child_frame=../talus_l
      Coordinate ankle_angle_l: default_value=0 range=(-1.047198 1.047198) clamped=false
      PhysicalOffsetFrame tibia_l_offset: translation=(0 -0.43 0)
        connectors: parent=../../tibia_l
      SpatialTransform: axes_held_at_zero=(rotation2 rotation3 translation1 translation2 translation3)
        TransformAxis rotation1: coordinates=ankle_angle_l axis=(0.1050135 0.1740224 0.9791263)
            LinearFunction(coefficients=1 0)
    CustomJoint subtalar_l:
      connectors: parent_frame=talus_l_offset child_frame=../calcn_l
      Coordinate subtalar_angle_l: default_value=0 range=(-1.570796 1.570796) clamped=false
      PhysicalOffsetFrame talus_l_offset: translation=(-0.04877 -0.04195 -0.00792)
        connectors: parent=../../talus_l
      SpatialTransform: axes_held_at_zero=(rotation2 rotation3 translation1 translation2 translation3)
        TransformAxis rotation1: coordinates=subtalar_angle_l axis=(-0.7871796 -0.6047475 -0.1209495)
            LinearFunction(coefficients=1 0)
    CustomJoint mtp_l:
      connectors: parent_frame=calcn_l_offset child_frame=../toes_l
      Coordinate mtp_angle_l: default_value=0 range=(-1.047198 1.047198) clamped=false
      PhysicalOffsetFrame calcn_l_offset: translation=(0.1788 -0.002 -0.00108)
        connectors: parent=../../calcn_l
      SpatialTransform: axes_held_at_zero=(rotation2 rotation3 translation1 translation2 translation3)
        TransformAxis rotation1: coordinates=mtp_angle_l axis=(0.5809544 0 0.8139361) LinearFunction(coefficients=1 0)
    CustomJoint back:
      connectors: parent_frame=pelvis_offset child_frame=../torso
      Coordinate lumbar_extension: default_value=0 range=(-1.570796 1.570796) clamped=false
      Coordinate lumbar_bending: default_value=0 range=(-1.570796 1.570796) clamped=false
      Coordinate lumbar_rotation: default_value=0 range=(-1.570796 1.570796) clamped=false
      PhysicalOffsetFrame pelvis_offset: translation=(-0.1007 0.0815 0)
        connectors: parent=../../pelvis
      SpatialTransform: axes_held_at_zero=(translation1 translation2 translation3)
        TransformAxis rotation1: coordinates=lumbar_extension axis=(0 0 1) LinearFunction(coefficients=1 0)
        TransformAxis rotation2: coordinates=lumbar_bending axis=(1 0 0) LinearFunction(coefficients=1 0)
        TransformAxis rotation3: coordinates=lumbar_rotation axis=(0 1 0) LinearFunction(coefficients=1 0)
  ForceSet:
    Thelen2003Muscle [values shared by the 54 below unless stated]: min_control=0 max_control=1 optimal_force=1
        max_contraction_velocity=10 FmaxTendonStrain=0.033 FmaxMuscleStrain=0.6 KshapeActive=0.5 KshapePassive=4 Af=0.3
        Flen=1.8 activation_time_constant=0.01 [seconds] deactivation_time_constant=0.04 [seconds]
    Thelen2003Muscle glut_med1_r: max_isometric_force=1119 optimal_fiber_length=0.0535 tendon_slack_length=0.078
        pennation_angle_at_optimal=0.1396263 [radians]
      PathPoint P1: (-0.0408 0.0304 0.1209)
        connectors: parent_frame=../../../pelvis
      PathPoint P2: (-0.0218 -0.0117 0.0555)
        connectors: parent_frame=../../../femur_r
    Thelen2003Muscle glut_med2_r: max_isometric_force=873 optimal_fiber_length=0.0845 tendon_slack_length=0.053
        pennation_angle_at_optimal=0
      PathPoint P1: (-0.0855 0.0445 0.0766)
        connectors: parent_frame=../../../pelvis
      PathPoint P2: (-0.0258 -0.0058 0.0527)
        connectors: parent_frame=../../../femur_r
    Thelen2003Muscle glut_med3_r: max_isometric_force=1000 optimal_fiber_length=0.0646 tendon_slack_length=0.053
        pennation_angle_at_optimal=0.3316126
      PathPoint P1: (-0.1223 0.0105 0.0648)
        connectors: parent_frame=../../../pelvis
      PathPoint P2: (-0.0309 -0.0047 0.0518)
        connectors: parent_frame=../../../femur_r
    Thelen2003Muscle bifemlh_r: max_isometric_force=2700 optimal_fiber_length=0.109 tendon_slack_length=0.326
        pennation_angle_at_optimal=0
      PathPoint P1: (-0.12596 -0.10257 0.06944)
        connectors: parent_frame=../../../pelvis
      PathPoint P2: (-0.0301 -0.036 0.02943)
        connectors: parent_frame=../../../tibia_r
      PathPoint P3: (-0.0234 -0.0563 0.0343)
        connectors: parent_frame=../../../tibia_r
    Thelen2003Muscle bifemsh_r: max_isometric_force=804 optimal_fiber_length=0.173 tendon_slack_length=0.089
        pennation_angle_at_optimal=0.4014257
      PathPoint P1: (0.005 -0.2111 0.0234)
        connectors: parent_frame=../../../femur_r
      PathPoint P2: (-0.0301 -0.036 0.02943)
        connectors: parent_frame=../../../tibia_r
      PathPoint P3: (-0.0234 -0.0563 0.0343)
        connectors: parent_frame=../../../tibia_r
    Thelen2003Muscle sar_r: max_isometric_force=156 optimal_fiber_length=0.52 tendon_slack_length=0.1
        pennation_angle_at_optimal=0
      PathPoint P1: (-0.0153 -0.0013 0.1242)
        connectors: parent_frame=../../../pelvis
      PathPoint P2: (-0.003 -0.3568 -0.0421)
        connectors: parent_frame=../../../femur_r
      PathPoint P3: (-0.0056 -0.0419 -0.0399)
        connectors: parent_frame=../../../tibia_r
      PathPoint P4: (0.006 -0.0589 -0.0383)
        connectors: parent_frame=../../../tibia_r
      PathPoint P5: (0.0243 -0.084 -0.0252)
        connectors: parent_frame=../../../tibia_r
    Thelen2003Muscle add_mag2_r: max_isometric_force=2343 optimal_fiber_length=0.121 tendon_slack_length=0.12
        pennation_angle_at_optimal=0.05235988
      PathPoint P1: (-0.0831 -0.1192 0.0308)
        connectors: parent_frame=../../../pelvis
      PathPoint P2: (0.0054 -0.2285 0.0227)
        connectors: parent_frame=../../../femur_r
    Thelen2003Muscle tfl_r: max_isometric_force=233 optimal_fiber_length=0.095 tendon_slack_length=0.425
        pennation_angle_at_optimal=0.05235988
      PathPoint P1: (-0.0311 0.0214 0.1241)
        connectors: parent_frame=../../../pelvis
      PathPoint P2: (0.0294 -0.0995 0.0597)
        connectors: parent_frame=../../../femur_r
      PathPoint P3: (0.0054 -0.4049 0.0357)
        connectors: parent_frame=../../../femur_r
      PathPoint P4: (0.006 -0.0487 0.0297)
        connectors: parent_frame=../../../tibia_r
    Thelen2003Muscle pect_r: max_isometric_force=266 optimal_fiber_length=0.1 tendon_slack_length=0.033
        pennation_angle_at_optimal=0
      PathPoint P1: (-0.0431 -0.0768 0.0451)
        connectors: parent_frame=../../../pelvis
      PathPoint P2: (-0.0122 -0.0822 0.0253)
        connectors: parent_frame=../../../femur_r
    Thelen2003Muscle grac_r: max_isometric_force=162 optimal_fiber_length=0.352 tendon_slack_length=0.126
        pennation_angle_at_optimal=0.05235988
      PathPoint P1: (-0.07401 -0.1187 0.02794)
        connectors: parent_frame=../../../pelvis
      ConditionalPathPoint P2: (-0.02657 -0.0319 -0.03774) range=(-0.436332 0.174533) [radians]
        connectors: coordinate=../../../knee_r/knee_angle_r parent_frame=../../../tibia_r
      PathPoint P3: (-0.01943 -0.05153 -0.0358)
        connectors: parent_frame=../../../tibia_r
      PathPoint P4: (0.006 -0.0836 -0.0228)
        connectors: parent_frame=../../../tibia_r
    Thelen2003Muscle glut_max1_r: max_isometric_force=573 optimal_fiber_length=0.142 tendon_slack_length=0.125
        pennation_angle_at_optimal=0.08726646
      PathPoint P1: (-0.1195 0.0612 0.07)
        connectors: parent_frame=../../../pelvis
      PathPoint P2: (-0.1291 0.0012 0.0886)
        connectors: parent_frame=../../../pelvis
      PathPoint P3: (-0.0457 -0.0248 0.0392)
        connectors: parent_frame=../../../femur_r
      PathPoint P4: (-0.0277 -0.0566 0.047)
        connectors: parent_frame=../../../femur_r
    Thelen2003Muscle glut_max2_r: max_isometric_force=819 optimal_fiber_length=0.147 tendon_slack_length=0.127
        pennation_angle_at_optimal=0
      PathPoint P1: (-0.1349 0.0176 0.0563)
        connectors: parent_frame=../../../pelvis
      PathPoint P2: (-0.1376 -0.052 0.0914)
        connectors: parent_frame=../../../pelvis
      PathPoint P3: (-0.0426 -0.053 0.0293)
        connectors: parent_frame=../../../femur_r
      PathPoint P4: (-0.0156 -0.1016 0.0419)
        connectors: parent_frame=../../../femur_r
    Thelen2003Muscle glut_max3_r: max_isometric_force=552 optimal_fiber_length=0.144 tendon_slack_length=0.145
        pennation_angle_at_optimal=0.08726646
      PathPoint P1: (-0.1556 -0.0314 0.0058)
        connectors: parent_frame=../../../pelvis
      PathPoint P2: (-0.1529 -0.1052 0.0403)
        connectors: parent_frame=../../../pelvis
      PathPoint P3: (-0.0299 -0.1041 0.0135)
        connectors: parent_frame=../../../femur_r
      PathPoint P4: (-0.006 -0.1419 0.0411)
        connectors: parent_frame=../../../femur_r
    Thelen2003Muscle iliacus_r: max_isometric_force=1073 optimal_fiber_length=0.1 tendon_slack_length=0.1
        pennation_angle_at_optimal=0.1221731
      PathPoint P1: (-0.0674 0.0365 0.0854)
        connectors: parent_frame=../../../pelvis
      PathPoint P2: (-0.0258 -0.055 0.0811)
        connectors: parent_frame=../../../pelvis
      ConditionalPathPoint P3: (-0.0288 -0.0805 0.0816) range=(-1.5708 0.785398)
        connectors: coordinate=../../../hip_r/hip_flexion_r parent_frame=../../../pelvis
      PathPoint P4: (0.0017 -0.0543 0.0057)
        connectors: parent_frame=../../../femur_r
      PathPoint P5: (-0.0193 -0.0621 0.0129)
        connectors: parent_frame=../../../femur_r
    Thelen2003Muscle psoas_r: max_isometric_force=1113 optimal_fiber_length=0.1 tendon_slack_length=0.16
        pennation_angle_at_optimal=0.1396263
      PathPoint P1: (-0.0647 0.0887 0.0289)
        connectors: parent_frame=../../../pelvis
      PathPoint P2: (-0.0238 -0.057 0.0759)
        connectors: parent_frame=../../../pelvis
      ConditionalPathPoint P3: (-0.0288 -0.0805 0.0816) range=(-1.5708 0.785398)
        connectors: coordinate=../../../hip_r/hip_flexion_r parent_frame=../../../pelvis
      PathPoint P4: (0.0016 -0.0507 0.0038)
        connectors: parent_frame=../../../femur_r
      PathPoint P5: (-0.0188 -0.0597 0.0104)
        connectors: parent_frame=../../../femur_r
    Thelen2003Muscle quad_fem_r: max_isometric_force=381 optimal_fiber_length=0.054 tendon_slack_length=0.024
        pennation_angle_at_optimal=0
      PathPoint P1: (-0.1143 -0.1151 0.052)
        connectors: parent_frame=../../../pelvis
      PathPoint P2: (-0.0381 -0.0359 0.0366)
        connectors: parent_frame=../../../femur_r
    Thelen2003Muscle gem_r: max_isometric_force=164 optimal_fiber_length=0.024 tendon_slack_length=0.039
        pennation_angle_at_optimal=0
      PathPoint P1: (-0.1133 -0.082 0.0714)
        connectors: parent_frame=../../../pelvis
      PathPoint P2: (-0.0142 -0.0033 0.0443)
        connectors: parent_frame=../../../femur_r
    Thelen2003Muscle peri_r: max_isometric_force=444 optimal_fiber_length=0.026 tendon_slack_length=0.115
        pennation_angle_at_optimal=0.1745329
      PathPoint P1: (-0.1396 0.0003 0.0235)
        connectors: parent_frame=../../../pelvis
      PathPoint P2: (-0.1193 -0.0276 0.0657)
        connectors: parent_frame=../../../pelvis
      PathPoint P3: (-0.0148 -0.0036 0.0437)
        connectors: parent_frame=../../../femur_r
    Thelen2003Muscle rect_fem_r: max_isometric_force=1169 optimal_fiber_length=0.114 tendon_slack_length=0.31
        pennation_angle_at_optimal=0.08726646
      PathPoint P1: (-0.0295 -0.0311 0.0968)
        connectors: parent_frame=../../../pelvis
      ConditionalPathPoint P2: (0.0334 -0.403 0.0019) range=(-2.61799 -1.45997)
        connectors: coordinate=../../../knee_r/knee_angle_r parent_frame=../../../femur_r
      MovingPathPoint P3: (NaN NaN NaN)
        connectors: x_coordinate=../../../knee_r/knee_angle_r y_coordinate=../../../knee_r/knee_angle_r
            z_coordinate=../../../knee_r/knee_angle_r parent_frame=../../../tibia_r
        x_location: MultiplierFunction: scale=1
          SimmSpline: x=(-2.0944 -1.99997 -1.5708 -1.45752 -1.39626 -1.0472 -0.698132 -0.526391 -0.349066 -0.174533 0 0.00017453 0.00034907 0.0279253 0.0872665 0.174533 2.0944)
              y=(0.0155805 0.0179938 0.0275081 0.0296564 0.0307615 0.0365695 0.0422074 0.0450902 0.048391 0.0534299 0.0617576 0.0617669 0.0617762 0.0633083 0.066994 0.0733035 0.0573481)
        y_location: MultiplierFunction: scale=1
          SimmSpline: x=(-2.0944 -1.99997 -1.5708 -1.45752 -1.39626 -1.0472 -0.698132 -0.526391 -0.349066 -0.174533 0 0.00017453 0.00034907 0.0279253 0.0872665 0.174533 2.0944)
              y=(0.0234116 0.0237613 0.0251141 0.0252795 0.0253146 0.0249184 0.0242373 0.0238447 0.0234197 0.0227644 0.020984 0.0209814 0.0209788 0.0205225 0.0191754 0.0159554 -0.0673774)
        z_location: MultiplierFunction: scale=1
          SimmSpline: x=(-2.0944 0.1745) y=(0.0014 0.0014)
    Thelen2003Muscle vas_int_r: max_isometric_force=5000 optimal_fiber_length=0.107 tendon_slack_length=0.116
        pennation_angle_at_optimal=0.05235988
      PathPoint P1: (0.029 -0.1924 0.031)
        connectors: parent_frame=../../../femur_r
      PathPoint P2: (0.0335 -0.2084 0.0285)
        connectors: parent_frame=../../../femur_r
      ConditionalPathPoint P3: (0.0343 -0.403 0.0055) range=(-2.61799 -1.42)
        connectors: coordinate=../../../knee_r/knee_angle_r parent_frame=../../../femur_r
      MovingPathPoint P4: (NaN NaN NaN)
        connectors: x_coordinate=../../../knee_r/knee_angle_r y_coordinate=../../../knee_r/knee_angle_r
            z_coordinate=../../../knee_r/knee_angle_r parent_frame=../../../tibia_r
        x_location: MultiplierFunction: scale=1
          SimmSpline: x=(-2.0944 -1.99997 -1.5708 -1.45752 -1.39626 -1.0472 -0.698132 -0.526391 -0.349066 -0.174533 0 0.00017453 0.00034907 0.0279253 0.0872665 0.174533 2.0944)
              y=(0.0082733 0.0106866 0.0202042 0.022353 0.0234583 0.0292715 0.0349465 0.037871 0.0412569 0.0465287 0.0554632 0.0554735 0.0554837 0.0571717 0.061272 0.0684368 0.0648818)
        y_location: MultiplierFunction: scale=1
          SimmSpline: x=(-2.0944 -1.99997 -1.5708 -1.45752 -1.39626 -1.0472 -0.698132 -0.526391 -0.349066 -0.174533 0 0.00017453 0.00034907 0.0279253 0.0872665 0.174533 2.0944)
              y=(0.025599 0.0259487 0.0273124 0.0274796 0.0275151 0.0271363 0.0265737 0.0263073 0.0261187 0.0260129 0.0252923 0.0252911 0.0252898 0.0250526 0.0242191 0.0218288 -0.0685706)
        z_location: MultiplierFunction: scale=1
          SimmSpline: x=(-2.0944 2.0944) y=(0.0018 0.0018)
    Thelen2003Muscle med_gas_r: max_isometric_force=2500 optimal_fiber_length=0.09 tendon_slack_length=0.36
        pennation_angle_at_optimal=0.296706
      PathPoint P1: (-0.019 -0.3929 -0.0235)
        connectors: parent_frame=../../../femur_r
      ConditionalPathPoint P2: (-0.03 -0.4022 -0.0258) range=(-0.785398 0.174533)
        connectors: coordinate=../../../knee_r/knee_angle_r parent_frame=../../../femur_r
      PathPoint P3: (0 0.031 -0.0053)
        connectors: parent_frame=../../../calcn_r
    Thelen2003Muscle soleus_r: max_isometric_force=4000 optimal_fiber_length=0.05 tendon_slack_length=0.25
        pennation_angle_at_optimal=0.4363323
      PathPoint P1: (-0.0024 -0.1533 0.0071)
        connectors: parent_frame=../../../tibia_r
      PathPoint P2: (0 0.031 -0.0053)
        connectors: parent_frame=../../../calcn_r
    Thelen2003Muscle tib_post_r: max_isometric_force=3600 optimal_fiber_length=0.031 tendon_slack_length=0.31
        pennation_angle_at_optimal=0.2094395
      PathPoint P1: (-0.0094 -0.1348 0.0019)
        connectors: parent_frame=../../../tibia_r
      PathPoint P2: (-0.0144 -0.4051 -0.0229)
        connectors: parent_frame=../../../tibia_r
      PathPoint P3: (0.0417 0.0334 -0.0286)
        connectors: parent_frame=../../../calcn_r
      PathPoint P4: (0.0772 0.0159 -0.0281)
        connectors: parent_frame=../../../calcn_r
    Thelen2003Muscle tib_ant_r: max_isometric_force=3000 optimal_fiber_length=0.098 tendon_slack_length=0.223
        pennation_angle_at_optimal=0.08726646
      PathPoint P1: (0.0179 -0.1624 0.0115)
        connectors: parent_frame=../../../tibia_r
      PathPoint P2: (0.0329 -0.3951 -0.0177)
        connectors: parent_frame=../../../tibia_r
      PathPoint P3: (0.1166 0.0178 -0.0305)
        connectors: parent_frame=../../../calcn_r
    Thelen2003Muscle glut_med1_l: max_isometric_force=1119 optimal_fiber_length=0.0535 tendon_slack_length=0.078
        pennation_angle_at_optimal=0.1396263
      PathPoint P1: (-0.0408 0.0304 -0.1209)
        connectors: parent_frame=../../../pelvis
      PathPoint P2: (-0.0218 -0.0117 -0.0555)
        connectors: parent_frame=../../../femur_l
    Thelen2003Muscle glut_med2_l: max_isometric_force=873 optimal_fiber_length=0.0845 tendon_slack_length=0.053
        pennation_angle_at_optimal=0
      PathPoint P1: (-0.0855 0.0445 -0.0766)
        connectors: parent_frame=../../../pelvis
      PathPoint P2: (-0.0258 -0.0058 -0.0527)
        connectors: parent_frame=../../../femur_l
    Thelen2003Muscle glut_med3_l: max_isometric_force=1000 optimal_fiber_length=0.0646 tendon_slack_length=0.053
        pennation_angle_at_optimal=0.3316126
      PathPoint P1: (-0.1223 0.0105 -0.0648)
        connectors: parent_frame=../../../pelvis
      PathPoint P2: (-0.0309 -0.0047 -0.0518)
        connectors: parent_frame=../../../femur_l
    Thelen2003Muscle bifemlh_l: max_isometric_force=2700 optimal_fiber_length=0.109 tendon_slack_length=0.326
        pennation_angle_at_optimal=0
      PathPoint P1: (-0.12596 -0.10257 -0.06944)
        connectors: parent_frame=../../../pelvis
      PathPoint P2: (-0.0301 -0.036 -0.02943)
        connectors: parent_frame=../../../tibia_l
      PathPoint P3: (-0.0234 -0.0563 -0.0343)
        connectors: parent_frame=../../../tibia_l
    Thelen2003Muscle bifemsh_l: max_isometric_force=804 optimal_fiber_length=0.173 tendon_slack_length=0.089
        pennation_angle_at_optimal=0.4014257
      PathPoint P1: (0.005 -0.2111 -0.0234)
        connectors: parent_frame=../../../femur_l
      PathPoint P2: (-0.0301 -0.036 -0.02943)
        connectors: parent_frame=../../../tibia_l
      PathPoint P3: (-0.0234 -0.0563 -0.0343)
        connectors: parent_frame=../../../tibia_l
    Thelen2003Muscle sar_l: max_isometric_force=156 optimal_fiber_length=0.52 tendon_slack_length=0.1
        pennation_angle_at_optimal=0
      PathPoint P1: (-0.0153 -0.0013 -0.1242)
        connectors: parent_frame=../../../pelvis
      PathPoint P2: (-0.003 -0.3568 0.0421)
        connectors: parent_frame=../../../femur_l
      PathPoint P3: (-0.0056 -0.0419 0.0399)
        connectors: parent_frame=../../../tibia_l
      PathPoint P4: (0.006 -0.0589 0.0383)
        connectors: parent_frame=../../../tibia_l
      PathPoint P5: (0.0243 -0.084 0.0252)
        connectors: parent_frame=../../../tibia_l
    Thelen2003Muscle add_mag2_l: max_isometric_force=2343 optimal_fiber_length=0.121 tendon_slack_length=0.12
        pennation_angle_at_optimal=0.05235988
      PathPoint P1: (-0.0831 -0.1192 -0.0308)
        connectors: parent_frame=../../../pelvis
      PathPoint P2: (0.0054 -0.2285 -0.0227)
        connectors: parent_frame=../../../femur_l
    Thelen2003Muscle tfl_l: max_isometric_force=233 optimal_fiber_length=0.095 tendon_slack_length=0.425
        pennation_angle_at_optimal=0.05235988
      PathPoint P1: (-0.0311 0.0214 -0.1241)
        connectors: parent_frame=../../../pelvis
      PathPoint P2: (0.0294 -0.0995 -0.0597)
        connectors: parent_frame=../../../femur_l
      PathPoint P3: (0.0054 -0.4049 -0.0357)
        connectors: parent_frame=../../../femur_l
      PathPoint P4: (0.006 -0.0487 -0.0297)
        connectors: parent_frame=../../../tibia_l
    Thelen2003Muscle pect_l: max_isometric_force=266 optimal_fiber_length=0.1 tendon_slack_length=0.033
        pennation_angle_at_optimal=0
      PathPoint P1: (-0.0431 -0.0768 -0.0451)
        connectors: parent_frame=../../../pelvis
      PathPoint P2: (-0.0122 -0.0822 -0.0253)
        connectors: parent_frame=../../../femur_l
    Thelen2003Muscle grac_l: max_isometric_force=162 optimal_fiber_length=0.352 tendon_slack_length=0.126
        pennation_angle_at_optimal=0.05235988
      PathPoint P1: (-0.07401 -0.1187 -0.02794)
        connectors: parent_frame=../../../pelvis
      ConditionalPathPoint P2: (-0.02657 -0.0319 0.03774) range=(-0.436332 0.174533)
        connectors: coordinate=../../../knee_l/knee_angle_l parent_frame=../../../tibia_l
      PathPoint P3: (-0.01943 -0.05153 0.0358)
        connectors: parent_frame=../../../tibia_l
      PathPoint P4: (0.006 -0.0836 0.0228)
        connectors: parent_frame=../../../tibia_l
    Thelen2003Muscle glut_max1_l: max_isometric_force=573 optimal_fiber_length=0.142 tendon_slack_length=0.125
        pennation_angle_at_optimal=0.08726646
      PathPoint P1: (-0.1195 0.0612 -0.07)
        connectors: parent_frame=../../../pelvis
      PathPoint P2: (-0.1291 0.0012 -0.0886)
        connectors: parent_frame=../../../pelvis
      PathPoint P3: (-0.0457 -0.0248 -0.0392)
        connectors: parent_frame=../../../femur_l
      PathPoint P4: (-0.0277 -0.0566 -0.047)
        connectors: parent_frame=../../../femur_l
    Thelen2003Muscle glut_max2_l: max_isometric_force=819 optimal_fiber_length=0.147 tendon_slack_length=0.127
        pennation_angle_at_optimal=0
      PathPoint P1: (-0.1349 0.0176 -0.0563)
        connectors: parent_frame=../../../pelvis
      PathPoint P2: (-0.1376 -0.052 -0.0914)
        connectors: parent_frame=../../../pelvis
      PathPoint P3: (-0.0426 -0.053 -0.0293)
        connectors: parent_frame=../../../femur_l
      PathPoint P4: (-0.0156 -0.1016 -0.0419)
        connectors: parent_frame=../../../femur_l
    Thelen2003Muscle glut_max3_l: max_isometric_force=552 optimal_fiber_length=0.144 tendon_slack_length=0.145
        pennation_angle_at_optimal=0.08726646
      PathPoint P1: (-0.1556 -0.0314 -0.0058)
        connectors: parent_frame=../../../pelvis
      PathPoint P2: (-0.1529 -0.1052 -0.0403)
        connectors: parent_frame=../../../pelvis
      PathPoint P3: (-0.0299 -0.1041 -0.0135)
        connectors: parent_frame=../../../femur_l
      PathPoint P4: (-0.006 -0.1419 -0.0411)
        connectors: parent_frame=../../../femur_l
    Thelen2003Muscle iliacus_l: max_isometric_force=1073 optimal_fiber_length=0.1 tendon_slack_length=0.1
        pennation_angle_at_optimal=0.1221731
      PathPoint P1: (-0.0674 0.0365 -0.0854)
        connectors: parent_frame=../../../pelvis
      PathPoint P2: (-0.0258 -0.055 -0.0811)
        connectors: parent_frame=../../../pelvis
      ConditionalPathPoint P3: (-0.0288 -0.0805 -0.0816) range=(-1.5708 0.785398)
        connectors: coordinate=../../../hip_l/hip_flexion_l parent_frame=../../../pelvis
      PathPoint P4: (0.0017 -0.0543 -0.0057)
        connectors: parent_frame=../../../femur_l
      PathPoint P5: (-0.0193 -0.0621 -0.0129)
        connectors: parent_frame=../../../femur_l
    Thelen2003Muscle psoas_l: max_isometric_force=1113 optimal_fiber_length=0.1 tendon_slack_length=0.16
        pennation_angle_at_optimal=0.1396263
      PathPoint P1: (-0.0647 0.0887 -0.0289)
        connectors: parent_frame=../../../pelvis
      PathPoint P2: (-0.0238 -0.057 -0.0759)
        connectors: parent_frame=../../../pelvis
      ConditionalPathPoint P3: (-0.0288 -0.0805 -0.0816) range=(-1.5708 0.785398)
        connectors: coordinate=../../../hip_l/hip_flexion_l parent_frame=../../../pelvis
      PathPoint P4: (0.0016 -0.0507 -0.0038)
        connectors: parent_frame=../../../femur_l
      PathPoint P5: (-0.0188 -0.0597 -0.0104)
        connectors: parent_frame=../../../femur_l
    Thelen2003Muscle quad_fem_l: max_isometric_force=381 optimal_fiber_length=0.054 tendon_slack_length=0.024
        pennation_angle_at_optimal=0
      PathPoint P1: (-0.1143 -0.1151 -0.052)
        connectors: parent_frame=../../../pelvis
      PathPoint P2: (-0.0381 -0.0359 -0.0366)
        connectors: parent_frame=../../../femur_l
    Thelen2003Muscle gem_l: max_isometric_force=164 optimal_fiber_length=0.024 tendon_slack_length=0.039
        pennation_angle_at_optimal=0
      PathPoint P1: (-0.1133 -0.082 -0.0714)
        connectors: parent_frame=../../../pelvis
      PathPoint P2: (-0.0142 -0.0033 -0.0443)
        connectors: parent_frame=../../../femur_l
    Thelen2003Muscle peri_l: max_isometric_force=444 optimal_fiber_length=0.026 tendon_slack_length=0.115
        pennation_angle_at_optimal=0.1745329
      PathPoint P1: (-0.1396 0.0003 -0.0235)
        connectors: parent_frame=../../../pelvis
      PathPoint P2: (-0.1193 -0.0276 -0.0657)
        connectors: parent_frame=../../../pelvis
      PathPoint P3: (-0.0148 -0.0036 -0.0437)
        connectors: parent_frame=../../../femur_l
    Thelen2003Muscle rect_fem_l: max_isometric_force=1169 optimal_fiber_length=0.114 tendon_slack_length=0.31
        pennation_angle_at_optimal=0.08726646
      PathPoint P1: (-0.0295 -0.0311 -0.0968)
        connectors: parent_frame=../../../pelvis
      ConditionalPathPoint P2: (0.0334 -0.403 -0.0019) range=(-2.61799 -1.45997)
        connectors: coordinate=../../../knee_l/knee_angle_l parent_frame=../../../femur_l
      MovingPathPoint P3: (NaN NaN NaN)
        connectors: x_coordinate=../../../knee_l/knee_angle_l y_coordinate=../../../knee_l/knee_angle_l
            z_coordinate=../../../knee_l/knee_angle_l parent_frame=../../../tibia_l
        x_location: MultiplierFunction: scale=1
          SimmSpline: x=(-2.0944 -1.99997 -1.5708 -1.45752 -1.39626 -1.0472 -0.698132 -0.526391 -0.349066 -0.174533 0 0.00017453 0.00034907 0.0279253 0.0872665 0.174533 2.0944)
              y=(0.0155805 0.0179938 0.0275081 0.0296564 0.0307615 0.0365695 0.0422074 0.0450902 0.048391 0.0534299 0.0617576 0.0617669 0.0617762 0.0633083 0.066994 0.0733035 0.0573481)
        y_location: MultiplierFunction: scale=1
          SimmSpline: x=(-2.0944 -1.99997 -1.5708 -1.45752 -1.39626 -1.0472 -0.698132 -0.526391 -0.349066 -0.174533 0 0.00017453 0.00034907 0.0279253 0.0872665 0.174533 2.0944)
              y=(0.0234116 0.0237613 0.0251141 0.0252795 0.0253146 0.0249184 0.0242373 0.0238447 0.0234197 0.0227644 0.020984 0.0209814 0.0209788 0.0205225 0.0191754 0.0159554 -0.0673774)
        z_location: MultiplierFunction: scale=1
          SimmSpline: x=(-2.0944 0.1745) y=(-0.0014 -0.0014)
    Thelen2003Muscle vas_int_l: max_isometric_force=5000 optimal_fiber_length=0.107 tendon_slack_length=0.116
        pennation_angle_at_optimal=0.05235988
      PathPoint P1: (0.029 -0.1924 -0.031)
        connectors: parent_frame=../../../femur_l
      PathPoint P2: (0.0335 -0.2084 -0.0285)
        connectors: parent_frame=../../../femur_l
      ConditionalPathPoint P3: (0.0343 -0.403 -0.0055) range=(-2.61799 -1.42)
        connectors: coordinate=../../../knee_l/knee_angle_l parent_frame=../../../femur_l
      MovingPathPoint P4: (NaN NaN NaN)
        connectors: x_coordinate=../../../knee_l/knee_angle_l y_coordinate=../../../knee_l/knee_angle_l
            z_coordinate=../../../knee_l/knee_angle_l parent_frame=../../../tibia_l
        x_location: MultiplierFunction: scale=1
          SimmSpline: x=(-2.0944 -1.99997 -1.5708 -1.45752 -1.39626 -1.0472 -0.698132 -0.526391 -0.349066 -0.174533 0 0.00017453 0.00034907 0.0279253 0.0872665 0.174533 2.0944)
              y=(0.0082733 0.0106866 0.0202042 0.022353 0.0234583 0.0292715 0.0349465 0.037871 0.0412569 0.0465287 0.0554632 0.0554735 0.0554837 0.0571717 0.061272 0.0684368 0.0648818)
        y_location: MultiplierFunction: scale=1
          SimmSpline: x=(-2.0944 -1.99997 -1.5708 -1.45752 -1.39626 -1.0472 -0.698132 -0.526391 -0.349066 -0.174533 0 0.00017453 0.00034907 0.0279253 0.0872665 0.174533 2.0944)
              y=(0.025599 0.0259487 0.0273124 0.0274796 0.0275151 0.0271363 0.0265737 0.0263073 0.0261187 0.0260129 0.0252923 0.0252911 0.0252898 0.0250526 0.0242191 0.0218288 -0.0685706)
        z_location: MultiplierFunction: scale=1
          SimmSpline: x=(-2.0944 2.0944) y=(-0.0018 -0.0018)
    Thelen2003Muscle med_gas_l: max_isometric_force=2500 optimal_fiber_length=0.09 tendon_slack_length=0.36
        pennation_angle_at_optimal=0.296706
      PathPoint P1: (-0.019 -0.3929 0.0235)
        connectors: parent_frame=../../../femur_l
      ConditionalPathPoint P2: (-0.03 -0.4022 0.0258) range=(-0.785398 0.174533)
        connectors: coordinate=../../../knee_l/knee_angle_l parent_frame=../../../femur_l
      PathPoint P3: (0 0.031 0.0053)
        connectors: parent_frame=../../../calcn_l
    Thelen2003Muscle soleus_l: max_isometric_force=4000 optimal_fiber_length=0.05 tendon_slack_length=0.25
        pennation_angle_at_optimal=0.4363323
      PathPoint P1: (-0.0024 -0.1533 -0.0071)
        connectors: parent_frame=../../../tibia_l
      PathPoint P2: (0 0.031 0.0053)
        connectors: parent_frame=../../../calcn_l
    Thelen2003Muscle tib_post_l: max_isometric_force=3600 optimal_fiber_length=0.031 tendon_slack_length=0.31
        pennation_angle_at_optimal=0.2094395
      PathPoint P1: (-0.0094 -0.1348 -0.0019)
        connectors: parent_frame=../../../tibia_l
      PathPoint P2: (-0.0144 -0.4051 0.0229)
        connectors: parent_frame=../../../tibia_l
      PathPoint P3: (0.0417 0.0334 0.0286)
        connectors: parent_frame=../../../calcn_l
      PathPoint P4: (0.0772 0.0159 0.0281)
        connectors: parent_frame=../../../calcn_l
    Thelen2003Muscle tib_ant_l: max_isometric_force=3000 optimal_fiber_length=0.098 tendon_slack_length=0.223
        pennation_angle_at_optimal=0.08726646
      PathPoint P1: (0.0179 -0.1624 -0.0115)
        connectors: parent_frame=../../../tibia_l
      PathPoint P2: (0.0329 -0.3951 0.0177)
        connectors: parent_frame=../../../tibia_l
      PathPoint P3: (0.1166 0.0178 0.0305)
        connectors: parent_frame=../../../calcn_l
    Thelen2003Muscle ercspn_r: max_isometric_force=2500 optimal_fiber_length=0.12 tendon_slack_length=0.03
        pennation_angle_at_optimal=0
      PathPoint P1: (-0.14 0.0439 0.0436)
        connectors: parent_frame=../../../pelvis
      PathPoint P2: (-0.055 0.11 0.0241)
        connectors: parent_frame=../../../torso
    Thelen2003Muscle ercspn_l: max_isometric_force=2500 optimal_fiber_length=0.12 tendon_slack_length=0.03
        pennation_angle_at_optimal=0
      PathPoint P1: (-0.14 0.0439 -0.0436)
        connectors: parent_frame=../../../pelvis
      PathPoint P2: (-0.055 0.11 -0.0241)
        connectors: parent_frame=../../../torso
    Thelen2003Muscle intobl_r: max_isometric_force=900 optimal_fiber_length=0.1 tendon_slack_length=0.1
        pennation_angle_at_optimal=0
      PathPoint P1: (-0.04 0.07 0.1157)
        connectors: parent_frame=../../../pelvis
      PathPoint P2: (0.07 0.16 0.015)
        connectors: parent_frame=../../../torso
    Thelen2003Muscle intobl_l: max_isometric_force=900 optimal_fiber_length=0.1 tendon_slack_length=0.1
        pennation_angle_at_optimal=0
      PathPoint P1: (-0.04 0.07 -0.1157)
        connectors: parent_frame=../../../pelvis
      PathPoint P2: (0.07 0.16 -0.015)
        connectors: parent_frame=../../../torso
    Thelen2003Muscle extobl_r: max_isometric_force=900 optimal_fiber_length=0.12 tendon_slack_length=0.14
        pennation_angle_at_optimal=0
      PathPoint P1: (-0.03 -0.0636 0.01)
        connectors: parent_frame=../../../pelvis
      PathPoint P2: (0.065 0.11 0.11)
        connectors: parent_frame=../../../torso
    Thelen2003Muscle extobl_l: max_isometric_force=900 optimal_fiber_length=0.12 tendon_slack_length=0.14
        pennation_angle_at_optimal=0
      PathPoint P1: (-0.03 -0.0636 -0.01)
        connectors: parent_frame=../../../pelvis
      PathPoint P2: (0.065 0.11 -0.11)
        connectors: parent_frame=../../../torso
    ObjectGroup R_hip_abd: members=(glut_max1_r glut_med1_r glut_med2_r glut_med3_r peri_r sar_r tfl_r)
    ObjectGroup R_hip_flex: members=(glut_med1_r grac_r iliacus_r pect_r psoas_r rect_fem_r sar_r tfl_r)
    ObjectGroup R_hip_inrot: members=(glut_med1_r iliacus_r psoas_r tfl_r)
    ObjectGroup R_hip_exrot: members=(gem_r glut_med3_r peri_r quad_fem_r)
    ObjectGroup R_hip_ext: members=(add_mag2_r bifemlh_r glut_max1_r glut_max2_r glut_max3_r glut_med3_r)
    ObjectGroup R_hip_add: members=(add_mag2_r bifemlh_r grac_r pect_r)
    ObjectGroup R_knee_bend: members=(bifemlh_r bifemsh_r grac_r med_gas_r sar_r)
    ObjectGroup R_knee_ext: members=(rect_fem_r vas_int_r)
    ObjectGroup R_ankle_pf: members=(med_gas_r soleus_r tib_post_r)
    ObjectGroup R_inverter: members=(tib_ant_r tib_post_r)
    ObjectGroup R_ankle_df: members=tib_ant_r
    ObjectGroup L_hip_abd: members=(glut_max1_l glut_med1_l glut_med2_l glut_med3_l peri_l sar_l tfl_l)
    ObjectGroup L_hip_flex: members=(glut_med1_l grac_l iliacus_l pect_l psoas_l rect_fem_l sar_l tfl_l)
    ObjectGroup L_hip_inrot: members=(glut_med1_l iliacus_l psoas_l tfl_l)
    ObjectGroup L_hip_exrot: members=(gem_l glut_med3_l peri_l quad_fem_l)
    ObjectGroup L_hip_ext: members=(add_mag2_l bifemlh_l glut_max1_l glut_max2_l glut_max3_l glut_med3_l)
    ObjectGroup L_hip_add: members=(add_mag2_l bifemlh_l grac_l pect_l)
    ObjectGroup L_knee_bend: members=(bifemlh_l bifemsh_l grac_l med_gas_l sar_l)
    ObjectGroup L_knee_ext: members=(rect_fem_l vas_int_l)
    ObjectGroup L_ankle_pf: members=(med_gas_l soleus_l tib_post_l)
    ObjectGroup L_inverter: members=(tib_ant_l tib_post_l)
    ObjectGroup L_ankle_df: members=tib_ant_l
    ObjectGroup back_ext: members=(ercspn_l ercspn_r)
    ObjectGroup back_rlb: members=(ercspn_r extobl_r intobl_r)
    ObjectGroup back_introt: members=(ercspn_r extobl_l intobl_r)
    ObjectGroup back_llb: members=(ercspn_l extobl_l intobl_l)
    ObjectGroup back_extrot: members=(ercspn_l extobl_r intobl_l)
    ObjectGroup back_flex: members=(extobl_l extobl_r intobl_l intobl_r)
  MarkerSet:
    Marker Sternum: (0.07 0.3 0)
      connectors: parent_frame=../torso
    Marker R.Acromium: (-0.03 0.44 0.15)
      connectors: parent_frame=../torso
    Marker L.Acromium: (-0.03 0.44 -0.15)
      connectors: parent_frame=../torso
    Marker Top.Head: (0.00084 0.657 0)
      connectors: parent_frame=../torso
    Marker R.ASIS: (0.02 0.03 0.128)
      connectors: parent_frame=../pelvis
    Marker L.ASIS: (0.02 0.03 -0.128)
      connectors: parent_frame=../pelvis
    Marker V.Sacral: (-0.16 0.04 0)
      connectors: parent_frame=../pelvis
    Marker R.Thigh.Upper: (0.018 -0.2 0.064)
      connectors: parent_frame=../femur_r
    Marker R.Thigh.Front: (0.08 -0.25 0.0047)
      connectors: parent_frame=../femur_r
    Marker R.Thigh.Rear: (0.01 -0.3 0.06)
      connectors: parent_frame=../femur_r
    Marker R.Knee.Lat: (0 -0.404 0.05)
      connectors: parent_frame=../femur_r
    Marker R.Knee.Med: (0 -0.404 -0.05)
      connectors: parent_frame=../femur_r
    Marker R.Shank.Upper: (0.005 -0.065 0.05)
      connectors: parent_frame=../tibia_r
    Marker R.Shank.Front: (0.05 -0.08 0)
      connectors: parent_frame=../tibia_r
    Marker R.Shank.Rear: (0.02 -0.13 0.05)
      connectors: parent_frame=../tibia_r
    Marker R.Ankle.Lat: (-0.005 -0.41 0.053)
      connectors: parent_frame=../tibia_r
    Marker R.Ankle.Med: (0.006 -0.3888 -0.038)
      connectors: parent_frame=../tibia_r
    Marker R.Heel: (-0.02 0.02 0)
      connectors: parent_frame=../calcn_r
    Marker R.Midfoot.Sup: (0.13 0.03 -0.03)
      connectors: parent_frame=../calcn_r
    Marker R.Midfoot.Lat: (0.1 0.02 0.04)
      connectors: parent_frame=../calcn_r
    Marker R.Toe.Lat: (0.19 0 0.065)
      connectors: parent_frame=../calcn_r
    Marker R.Toe.Med: (0.19 0.005 -0.04)
      connectors: parent_frame=../calcn_r
    Marker R.Toe.Tip: (0.26 0.005 0)
      connectors: parent_frame=../calcn_r
    Marker L.Thigh.Upper: (0.018 -0.2 -0.064)
      connectors: parent_frame=../femur_l
    Marker L.Thigh.Front: (0.08 -0.25 -0.0047)
      connectors: parent_frame=../femur_l
    Marker L.Thigh.Rear: (0.01 -0.3 -0.06)
      connectors: parent_frame=../femur_l
    Marker L.Knee.Lat: (0 -0.404 -0.05)
      connectors: parent_frame=../femur_l
    Marker L.Knee.Med: (0 -0.404 0.05)
      connectors: parent_frame=../femur_l
    Marker L.Shank.Upper: (0.005 -0.065 -0.05)
      connectors: parent_frame=../tibia_l
    Marker L.Shank.Front: (0.05 -0.08 0)
      connectors: parent_frame=../tibia_l
    Marker L.Shank.Rear: (-0.02 -0.13 -0.05)
      connectors: parent_frame=../tibia_l
    Marker L.Ankle.Lat: (-0.005 -0.41 -0.053)
      connectors: parent_frame=../tibia_l
    Marker L.Ankle.Med: (0.006 -0.3888 0.038)
      connectors: parent_frame=../tibia_l
    Marker L.Heel: (-0.02 0.02 0)
      connectors: parent_frame=../calcn_l
    Marker L.Midfoot.Sup: (0.13 0.03 0.03)
      connectors: parent_frame=../calcn_l
    Marker L.Midfoot.Lat: (0.1 0.02 -0.04)
      connectors: parent_frame=../calcn_l
    Marker L.Toe.Lat: (0.19 0 -0.065)
      connectors: parent_frame=../calcn_l
    Marker L.Toe.Med: (0.19 0.005 0.04)
      connectors: parent_frame=../calcn_l
    Marker L.Toe.Tip: (0.26 0.005 0)
      connectors: parent_frame=../calcn_l
